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/batch
! ANSYS input file written by Workbench version 18.2 RELEASE
! File used for geometry attach: C:\Users\Saraswathi Andappan\Desktop\ANSYS Cornell\2D Conduction_files\dp0\SYS\DM\SYS.scdoc
/title,2D Conduction--Steady-State Thermal (A5)
/com,--- Data in consistent MKS units. See Solving Units in the help system for more information.
/units,MKS
/prep7
! Turn off shape checking because checks already performed inside WB mesher.
! See help system for more information.
SHPP,OFF,,NOWARN
etcon,set             ! allow ANSYS to choose best KEYOP's for 180x elements
/com,*********** Nodes for the whole assembly ***********
nblock,3,,133
(1i9,3e20.9e3)
        1    0.000000000E+000    2.000000000E+000    0.000000000E+000
        2    0.000000000E+000    0.000000000E+000    0.000000000E+000
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-1
/com,*********** Elements for Body 1 "SYS\Surface" ***********
et,1,77
keyo,1,3,3
eblock,19,solid,,32
(19i9)
        1        1        1        1        0        0        0        0        8        0        1       29        5       38        3       56       57       51       50
        1        1        1        1        0        0        0        0        8        0        2       30        8        5       29       66       55       56      108
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-1
/com,*********** Send User Defined Coordinate System(s) ***********
csys,0
toffst,273.15,  ! Temperature offset from absolute zero
/com,*********** Send Materials ***********
MP,KXX,1,1,	! W m^-1 C^-1

/com,*********** Send Sheet Properties ***********
r,1,1.
!************************* Model Summary ********************
!SYS\Surface,	NEU,	matid,	1
!************************* End Model Summary ********************
/com,*********** Define Temperature Constraint ***********
CMBLOCK,_CM35   ,NODE,        9
(8i10)
         2         3        36        37        38        48        51       114
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
*DIM,_loadvari35,TABLE,2,1,1,TIME,
! Time values
_loadvari35(1,0,1) = 0.
_loadvari35(2,0,1) = 1.
! Load values
_loadvari35(1,1,1) = 22.
_loadvari35(2,1,1) = 1.

fcum,add                   ! add nodal forces up (needed in case have loads on the same edge,vertex)
fcum                       ! reset default on fcum command since done sending WB F loads
/com,*********** Create "Convection" ***********
et,2,151
keyop,2,3,10   !get plane option and thickness from underlying element
eblock,10,,,8
(15i9)
       33        2        2        2        0       29        3       50
       34        2        2        2        0       30       29      108
       35        2        2        2        0       31       30      109
       36        2        2        2        0       32       31      110
       37        2        2        2        0       33       32      111
       38        2        2        2        0       34       33      112
       39        2        2        2        0       35       34      113
       40        2        2        2        0        4       35       53
-1
esel,s,type,,2
keyop,2,8,2.
keyop,2,13,0.

*DIM,_convvari41,TABLE,2,1,1,TIME,
! Time values
_convvari41(1,0,1) = 0.
_convvari41(2,0,1) = 1.
! Load values
_convvari41(1,1,1) = 0.
_convvari41(2,1,1) = 5.


*DIM,_loadvari41,TABLE,2,1,1,TIME,
! Time values
_loadvari41(1,0,1) = 0.
_loadvari41(2,0,1) = 1.
! Load values
_loadvari41(1,1,1) = 22.
_loadvari41(2,1,1) = 0.

esel,all
/com,***************** Define Uniform Initial temperature ***************
tunif,22.
fini
/com,****************************************************************************
/com,*************************    SOLUTION       ********************************
/com,****************************************************************************
/solu
antype,0                   ! static analysis
!eqsl,sparse               ! using sparse solver which is default so no eqsl command needed
cntr,print,1               ! print out contact info and also make no initial contact an error
rescontrol,,none                 ! Do not keep any restart files
dmpoption,emat,no             ! Don't combine emat file for DANSYS
dmpoption,esav,no             ! Don't combine esav file for DANSYS
/com,****************************************************
/com,******************* SOLVE FOR LS 1 OF 1 ****************
d,_CM35,temp,%_loadvari35%
esel,s,type,,2
nsle
sf,all,conv,%_convvari41%,%_loadvari41%
nsel,all
esel,all
autots,on
nsub,1,10,1
time,1.
outres,erase
outres,all,none
outres,nsol,all
outres,rsol,all
outres,fflux,all
esel,s,mat,,2
cm,_elmisc,elem
esel,all
outres,misc,all,_elmisc
cnvtol,heat,,.001,,1.e-006 ! Program Controlled. Set MINREF equivalent of 1e-6 Watts
! *********** WB SOLVE COMMAND ***********
! check interactive state
*get,ANSINTER_,active,,int
*if,ANSINTER_,ne,0,then
/eof
*endif
solve
/com *************** Write FE CONNECTORS *********
CEWRITE,file,ce,,INTE
/com,****************************************************
/com,*************** FINISHED SOLVE FOR LS 1 *************
/post1
fini
